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/batch
! ANSYS input file written by Workbench version 2026 R1
! File used for geometry attach: C:\Users\aparr\Documents\ansys-digital-twin\AGARD_445_6_files\dp0\SYS\DM\SYS.agdb
/title,AGARD_445_6--Modal (A5)
/com,--- Data in consistent MKS units. See Solving Units in the help system for more information.
/units,MKS
/prep7
! Turn off shape checking because checks already performed inside WB mesher.
! See help system for more information.
SHPP,OFF,,NOWARN
etcon,set             ! allow ANSYS to choose best KEYOP's for 180x elements, resets any applicable keyopt to MAPDL defaults
/com,*********** Send User Defined Coordinate System(s) ***********
csys,0
/com,*********** Nodes for the whole assembly ***********
nblock,3,,102
(1i9,3e20.9e3)
        1     6.467076923E-01     1.172307692E-01     0.000000000E+00
        2     5.936636362E-01     1.701364291E-01     0.000000000E+00
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-1
/com,*********** Elements for Body 1 'Surface Body' ***********
et,1,181
keyo,1,1,0          ! bending and membrane stiffness
keyo,1,3,2
MAT,1 $ TYPE,1 $ REAL,1 $ SECNUM,1 $ ESYS,0    ! ELEMNODES = 4
eblock,21,COMPACT,,75
(21i9)
       11       84       83       85       85
       20       10       36        9        9
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-1
secnum,1    ! reset the section ID to default
toffst,273.15,      ! Temperature offset from absolute zero
/com,*********** Set Reference Temperature ***********
tref,22.
/com,*********** Send Materials ***********
MP,DENS,1,2780,	! kg m^-3
MP,EX,1,73100000000,	! Pa
MP,NUXY,1,0.33,

/com,*********** Send Sheet Properties ***********
sectype,1,shell
secdata,1.e-002
secoff,mid

!************************* Model Summary ********************
! Surface Body,	Aluminio 2024 - T3,	matid,	1
!************************* End Model Summary ********************
/com,*********** Send Named Selection as Node Component ***********
CMBLOCK,FORCE_INPUT,NODE,        1
(8i10)
        81
CMBLOCK,SENSOR_1,NODE,        1
(8i10)
        76
CMBLOCK,SENSOR_2,NODE,        1
(8i10)
        13
CMBLOCK,SENSOR_3,NODE,        1
(8i10)
        82
/com,*********** Fixed Supports ***********
CMBLOCK,_FIXEDSU,NODE,        9
(8i10)
         6        11        14        15        18        19        51        78
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cmsel,s,_FIXEDSU
d,all,all
nsel,all
fini
/solu
antype,2                   ! modal analysis
_thickRatio=  0     ! Ratio of thick parts in the model
thexpand,off     ! ignore thermal strains
modopt,lanb,20
outres,erase
outres,all,none
outres,nsol,all
mxpand,,,,,,,       ! default expand in case of complex solution
dmpopt,esav,no
dmpopt,emat,no
dmpopt,full,no
! *********** WB SOLVE COMMAND ***********
! check interactive state
*get,ANSINTER_,active,,int
*if,ANSINTER_,ne,0,then
/eof
*endif
solve
/com *************** Write FE CONNECTORS *********
CEWRITE,file,ce,,INTE
*get,_nmodalsolproc,active,0,numcpu
fini
*get,_NSOLTHREADS,active,0,ntfs
*get,_NSOLPROCESSES,active,0,npfs
/post1
*dim,_direction,CHAR,6,1
_direction(1) = 'X'
_direction(2) = 'Y'
_direction(3) = 'Z'
_direction(4) = 'ROTX'
_direction(5) = 'ROTY'
_direction(6) = 'ROTZ'
*get,_lastLS,active,0,set,LSTP
*get,_beginset,active,0,set,nset,first,_lastLS
*get,_endset,active,0,set,nset,last,_lastLS
_nummodes = 0
*if,_endset,gt,0,then
_nummodes = _endset - _beginset + 1
*endif
*do,i_mode,1,_nummodes
   *do,j_component,1,6
			*get,PFACT_%i_mode%_%j_component%,MODE,%i_mode%,PFACT,,DIREC,_direction(%j_component%)
   *enddo
*enddo
*dim,_tmdirection,CHAR,6,1
_tmdirection(1) = 'X'
_tmdirection(2) = 'Y'
_tmdirection(3) = 'Z'
_tmdirection(4) = 'X'
_tmdirection(5) = 'Y'
_tmdirection(6) = 'Z'
*do,j_component,1,6
    *if,j_component,gt,3,then
        *get,TOTALMASS_%j_component%,ELEM,0,IOR,_tmdirection(%j_component%)
    *else
        *get,TOTALMASS_%j_component%,ELEM,0,MTOT,_tmdirection(%j_component%)
    *endif
*enddo
! ****** Begin Command Snippet ******
!   Commands inserted into this file will be executed immediately after the ANSYS /POST1 command.

!   Active UNIT system in Workbench when this object was created:  Metric (m, kg, N, s, V, A)
!   NOTE:  Any data that requires units (such as mass) is assumed to be in the consistent solver unit system.
!                See Solving Units in the help system for more information.


/POST1

cmsel,s,Force_Input
*get, n_in, node,, num, max
*dim, in_arr, array, 1, 2
in_arr(1,1) = n_in
in_arr(1,2) = 3

*dim, out_arr, array, 3, 2

cmsel,s,Sensor_1
*get, n_s1, node,, num, max
out_arr(1,1) = n_s1
out_arr(1,2) = 3

cmsel,s,Sensor_2
*get, n_s2, node,, num, max
out_arr(2,1) = n_s2
out_arr(2,2) = 3

cmsel,s,Sensor_3
*get, n_s3, node,, num, max
out_arr(3,1) = n_s3
out_arr(3,2) = 3

alls

spmwrite, MODAL, , in_arr, , out_arr, , , 1, 2


! ****** End   Command Snippet ******
fini
