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/batch
! Executing MAPDL for /post1 evaluation of command objects only
_wb_post_run = 1
/post1
! ****** Begin Command Snippet ******
!   Commands inserted into this file will be executed immediately after the ANSYS /POST1 command.

!   Active UNIT system in Workbench when this object was created:  Metric (m, kg, N, s, V, A)
!   NOTE:  Any data that requires units (such as mass) is assumed to be in the consistent solver unit system.
!                See Solving Units in the help system for more information.


! ===========================================================
! Script APDL: Exportar frecuencias y modos a CSV
! ===========================================================
/POST1

! Crear y abrir el archivo de salida en el directorio de trabajo
*CFOPEN, modal_data, csv

! Escribir encabezado de las columnas
*VWRITE,'Mode','Freq_Hz','Force_UZ','Sens1_UZ','Sens2_UZ','Sens3_UZ'
(A6, A12, A14, A14, A14, A14)

! Obtener el número total de modos calculados
*GET, num_modes, ACTIVE, 0, SET, NSET

*DO, i, 1, num_modes
   ! Cargar la solución del modo i
   SET, 1, i
   *GET, freq, ACTIVE, 0, SET, FREQ

   ! Desplazamiento en Z en el nodo de entrada de fuerza
   CMSEL, S, Force_Input
   *GET, node_in, NODE, 0, NUM, MIN
   *GET, uz_in, NODE, node_in, U, Z

   ! Desplazamiento en Z en Sensor 1
   CMSEL, S, Sensor_1
   *GET, node_s1, NODE, 0, NUM, MIN
   *GET, uz_s1, NODE, node_s1, U, Z

   ! Desplazamiento en Z en Sensor 2
   CMSEL, S, Sensor_2
   *GET, node_s2, NODE, 0, NUM, MIN
   *GET, uz_s2, NODE, node_s2, U, Z

   ! Desplazamiento en Z en Sensor 3
   CMSEL, S, Sensor_3
   *GET, node_s3, NODE, 0, NUM, MIN
   *GET, uz_s3, NODE, node_s3, U, Z

   ALLSEL, ALL

   ! Escribir datos del modo actual
   *VWRITE, i, freq, uz_in, uz_s1, uz_s2, uz_s3
   (F6.0, ',', F12.4, ',', E14.6, ',', E14.6, ',', E14.6, ',', E14.6)

*ENDDO

*CFCLOSE

! ****** End   Command Snippet ******
fini
